11/08/2015
12:28
; Script generated by the pharmML2Nmtran Converter v.0.1.0
; Source	: PharmML 0.6.0
; Target	: NMTRAN 7.3.0
; Model 	: Friberg_PANSS
; Dated 	: Tue Aug 11 12:28:27 BST 2015

$PROBLEM "Friberg_PANSS.mdl - generated by MDL2PharmML v.6.0"

$INPUT  ID TIME DV STUD DDUR HOSP US AUC MDV
$DATA "PANSS_Friberg2009_simdata_2.csv" IGNORE=@

$PRED
PAN0_II = THETA(1)
PAN0_III = THETA(2)
PAN0_CHRON = THETA(3)
TVPMAX = THETA(4)
PMAX_PHASEIII = THETA(5)
TP = THETA(6)
POW = THETA(7)
POP_AUC50 = THETA(8)
EMAX = THETA(9)
THETA_HOSP = THETA(10)
THETA_US = THETA(11)
POP_ERROR = THETA(12)

ETA_PAN0 = ETA(1)
ETA_PMAX = ETA(2)
ETA_AUC50 = ETA(3)
ETA_W = ETA(4)

IF (DDUR.GT.2) THEN
	DDU = 1
ELSE
	DDU = 0
ENDIF


IF (STUD.GT.30) THEN
	PHASE = 1
ELSE
	PHASE = 0
ENDIF


IF (PHASE.EQ.0) THEN
	POP_PAN0 = PAN0_II*(1+PAN0_CHRON*DDU)
ELSE
	POP_PAN0 = PAN0_III*(1+PAN0_CHRON*DDU)
ENDIF


POP_PMAX = TVPMAX*(1+PMAX_PHASEIII*PHASE)
IF (HOSP.EQ.0) THEN
	CHOSP = (1+THETA_HOSP)
ELSE
	CHOSP = 1
ENDIF


POP_W = CHOSP*POP_ERROR*(1+THETA_US*US)

MU_1 = POP_PAN0 ;
PAN0 = MU_1 + ETA(1);

MU_2 = POP_PMAX ;
PMAX = MU_2 + ETA(2);

MU_3 = LOG(POP_AUC50);
AUC50 = EXP(MU_3 + ETA(3));

W = POP_W*EXP(ETA_W) ;
PMOD = PMAX*(1-EXP(-(TIME/TP)**POW))
IF (TIME.GT.42) THEN
	FT = 1
ELSE
	FT = TIME/42
ENDIF

EFF = EMAX*AUC/(AUC50+AUC)*FT
IF (TIME.GT.0.AND.AUC.GT.0) THEN
	EMOD = EFF
ELSE
	EMOD = 0
ENDIF

PANSS_TOTAL = PAN0*(1-PMOD)*(1-EMOD)

IPRED = PANSS_TOTAL
W = W
Y = IPRED+W*EPS(1)
IRES = DV - IPRED
IWRES = IRES/W

$THETA
(94.0 )	;PAN0_II
(90.5 )	;PAN0_III
(-0.0339 )	;PAN0_CHRON
(0.0859 )	;TVPMAX
(0.688 )	;PMAX_PHASEIII
( 0.0 , 13.2 )	;TP
( 0.0 , 1.24 )	;POW
(82.0 )	;POP_AUC50
(0.191 )	;EMAX
(-0.145 )	;THETA_HOSP
(0.623 )	;THETA_US
(3.52 )	;POP_ERROR

$OMEGA
(167.0 )	;OMEGA_PAN0
(0.0249 )	;OMEGA_PMAX
(21.7 )	;OMEGA_AUC50
(0.196 )	;OMEGA_W

$SIGMA
1.0 FIX	;eps

$EST METHOD=COND INTER MAXEVALS=9999 PRINT=10 NOABORT
$COV

$TABLE  ID TIME STUD DDUR HOSP US AUC MDV PRED IPRED RES IRES WRES IWRES Y DV NOAPPEND NOPRINT FILE=sdtab

$TABLE  ID PAN0 PMAX AUC50 W ETA_PAN0 ETA_PMAX ETA_AUC50 ETA_W NOAPPEND NOPRINT FILE=patab

$TABLE  ID HOSP US NOAPPEND NOPRINT FILE=catab

$TABLE  ID STUD DDUR AUC NOAPPEND NOPRINT FILE=cotab

NM-TRAN MESSAGES
 WARNINGS AND ERRORS (IF ANY) FOR PROBLEM    1
 (WARNING  2) NM-TRAN INFERS THAT THE DATA ARE POPULATION.

1NONLINEAR MIXED EFFECTS MODEL PROGRAM (NONMEM) VERSION 7.3.0
 ORIGINALLY DEVELOPED BY STUART BEAL, LEWIS SHEINER, AND ALISON BOECKMANN
 CURRENT DEVELOPERS ARE ROBERT BAUER, ICON DEVELOPMENT SOLUTIONS,
 AND ALISON BOECKMANN. IMPLEMENTATION, EFFICIENCY, AND STANDARDIZATION
 PERFORMED BY NOUS INFOSYSTEMS.
 PROBLEM NO.:         1
 "Friberg_PANSS.mdl - generated by MDL2PharmML v.6.0"
 TOT. NO. OF OBS RECS:     7728
 TOT. NO. OF INDIVIDUALS:   1323
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 #TBLN:      1
 #METH: First Order Conditional Estimation with Interaction
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
 #TERM:
0MINIMIZATION TERMINATED
 DUE TO ROUNDING ERRORS (ERROR=134)
 NO. OF FUNCTION EVALUATIONS USED:     1447
 NO. OF SIG. DIGITS IN FINAL EST.:  2.7

 ETABAR IS THE ARITHMETIC MEAN OF THE ETA-ESTIMATES,
 AND THE P-VALUE IS GIVEN FOR THE NULL HYPOTHESIS THAT THE TRUE MEAN IS 0.

 ETABAR:         9.5069E-02  1.6894E-03  1.7061E-01 -6.5269E-02
 SE:             3.5407E-01  3.9411E-03  2.4014E-02  4.6103E-03
 N:                    1323        1323        1323        1323

 P VAL.:         7.8831E-01  6.6817E-01  1.2150E-12  1.7588E-45

 ETAshrink(%):   3.1557E+00  1.2164E+01  7.8005E+01  2.6665E+01
 EBVshrink(%):   3.8816E+00  1.3962E+01  7.6169E+01  3.9457E+01
 EPSshrink(%):   1.1317E+01

 #TERE:
 Elapsed estimation time in seconds:   127.64

 ********************               FIRST ORDER CONDITIONAL ESTIMATION WITH INTERACTION              ********************
 #OBJT:**************                       MINIMUM VALUE OF OBJECTIVE FUNCTION                      ********************
 #OBJV:********************************************    40909.818       **************************************************

 ********************               FIRST ORDER CONDITIONAL ESTIMATION WITH INTERACTION              ********************
 ********************                             FINAL PARAMETER ESTIMATE                           ********************

 THETA - VECTOR OF FIXED EFFECTS PARAMETERS   *********
         TH 1      TH 2      TH 3      TH 4      TH 5      TH 6      TH 7      TH 8      TH 9      TH10      TH11      TH12
         9.28E+01  9.09E+01 -3.18E-02  7.21E-02  1.08E+00  1.35E+01  1.16E+00  2.02E+00  9.05E-02 -1.47E-01  6.30E-01  3.60E+00

 OMEGA - COV MATRIX FOR RANDOM EFFECTS - ETAS  ********
            ETA1      ETA2      ETA3      ETA4
 ETA1
+        1.77E+02
 ETA2
+        0.00E+00  2.67E-02
 ETA3
+        0.00E+00  0.00E+00  1.58E+01
 ETA4
+        0.00E+00  0.00E+00  0.00E+00  5.23E-02

 SIGMA - COV MATRIX FOR RANDOM EFFECTS - EPSILONS  ****
            EPS1
 EPS1
+        1.00E+00

 OMEGA - CORR MATRIX FOR RANDOM EFFECTS - ETAS  *******
            ETA1      ETA2      ETA3      ETA4
 ETA1
+        1.33E+01
 ETA2
+        0.00E+00  1.63E-01
 ETA3
+        0.00E+00  0.00E+00  3.97E+00
 ETA4
+        0.00E+00  0.00E+00  0.00E+00  2.29E-01

 SIGMA - CORR MATRIX FOR RANDOM EFFECTS - EPSILONS  ***
            EPS1
 EPS1
+        1.00E+00
 #CPUT: Total CPU Time in Seconds,      132.585
