27/11/2014
11:54
$PROBLEM Warfarin_PK_ODE in 0.3.1

$DATA warfarin_conc.csv IGNORE=@
; The IGNORE= statement will use the first character in the header row
; of the dataset. If this character is alphabetical the @ symbol can be set.
; If there is no header row there should be no IGNORE=<character> option on
; the $DATA statement.

$INPUT ID TIME WT AMT DVID DV MDV LOGTWT

$SUBS ADVAN13 TOL=9 ; Hardcoded for DE problems

$MODEL
COMP (GUT)
COMP (CENTR)

$PK

; Population parameter definitions

  POP_TLAG=THETA(1)
  POP_KA=THETA(2)
  POP_V=THETA(3)
  POP_CL=THETA(4)
  BETA_V_WT=THETA(5)
  BETA_CL_WT=THETA(6)

; Individual parameter definitions

  TLAG=POP_TLAG*EXP(ETA(1))
  KA=POP_KA*EXP(ETA(2))
  V=POP_V*EXP(BETA_V_WT*LOGTWT)*EXP(ETA(3))
  CL=POP_CL*EXP(BETA_CL_WT*LOGTWT)*EXP(ETA(4))

  ; I am hoping to include the below addition that will enable the
  ; mu referencing feature for EM methods in Nonmem. Unfortunately
  ; I'm not yet sure how to handle cases where the PharmML breaks
  ; Nonmem rules for mu referencing.
  ;
  ; MU_1=LOG(POP_TLAG)
  ; MU_2=LOG(POP_KA)
  ; MU_3=LOG(POP_V)
  ; MU_4=LOG(POP_CL)

$DES

  IF(TIME.GT.TLAG) THEN
    RATEIN=A(1)*KA
  ELSE
    RATEIN=0
  ENDIF

  DADT(1)=-RATEIN
  DADT(2)=RATEIN-(CL*(A(2)/V))

$ERROR

  CC=A(2)/V

; Hardcoded CombinedError1 with the mapping of f to CC, additive to RUV_ADD and
; proportional to RUV_PROP

   IPRED = CC+0.00001
   IF(CC.GT.0) IPRED = CC
   W = THETA(7)+THETA(8)*IPRED
   Y = CC+W*EPS(1)
   IPRED = CC
   IRES = DV - IPRED
   IWRES = IRES / W

$THETA
  1             ; POP_TLAG
  0.362         ; POP_KA
  8             ; POP_V
  0.1           ; POP_CL
  1 FIX         ; BETA_V_WT
  0.75 FIX      ; BETA_CL_WT
  0.1           ; RUV_ADD
  0.1   	    ; RUV_PROP

$OMEGA
  0.1 SD        ; PPV_TLAG
  0.1 SD        ; PPV_KA

; Blocks are now written out line by line to satisfy output parser requirements.

$OMEGA BLOCK(2) SD CORRELATION
  0.1           ; PPV_V
  0.01          ; CORR_CL_V
  0.1           ; PPV_CL

$SIGMA
  1 FIX

; Hardcoded SAEM method

;$ESTIMATION METHOD=SAEM INTER NBURN=2000 NITER=100 ISAMPLE=2 IACCEPT=0.4 PRINT=10 CTYPE=3

$EST METHOD=COND INTER MAXEVALS=9999 PRINT=10


; Table output logic not yet fully defined. It is being reworked for xpose compatibility.

$TABLE ID TIME DV IPRED Y IRES IWRES  FILE=sdtab

$TABLE ID TIME TLAG KA V CL FILE=patab NOAPPEND

$TABLE ID TIME WT LOGTWT FILE=cotab NOAPPEND

NM-TRAN MESSAGES
 WARNINGS AND ERRORS (IF ANY) FOR PROBLEM    1
 (WARNING  2) NM-TRAN INFERS THAT THE DATA ARE POPULATION.

1NONLINEAR MIXED EFFECTS MODEL PROGRAM (NONMEM) VERSION 7.2.0
 ORIGINALLY DEVELOPED BY STUART BEAL, LEWIS SHEINER, AND ALISON BOECKMANN
 CURRENT DEVELOPERS ARE ROBERT BAUER, ICON DEVELOPMENT SOLUTIONS,
 AND ALISON BOECKMANN. IMPLEMENTATION, EFFICIENCY, AND STANDARDIZATION
 PERFORMED BY NOUS INFOSYSTEMS.
 PROBLEM NO.:         1
 Warfarin_PK_ODE in 0.3.1
 TOT. NO. OF OBS RECS:      250
 TOT. NO. OF INDIVIDUALS:     32
 GENERAL NONLINEAR KINETICS MODEL USING LSODA (ADVAN13)
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 #TBLN:      1
 #METH: First Order Conditional Estimation with Interaction
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
 #TERM:
0MINIMIZATION TERMINATED
 DUE TO ROUNDING ERRORS (ERROR=134)
 NO. OF FUNCTION EVALUATIONS USED:     1648
 NO. OF SIG. DIGITS UNREPORTABLE

 ETABAR IS THE ARITHMETIC MEAN OF THE ETA-ESTIMATES,
 AND THE P-VALUE IS GIVEN FOR THE NULL HYPOTHESIS THAT THE TRUE MEAN IS 0.

 ETABAR:         0.0000E+00 -1.4555E-02 -1.4560E-02  8.5036E-02
 SE:             0.0000E+00  4.4405E-02  1.2869E-02  4.3113E-02

 P VAL.:         1.0000E+00  7.4308E-01  2.5786E-01  4.8564E-02

 ETAshrink(%):   1.0000E+02  5.0007E+01  2.9988E+01  3.8821E+00
 EPSshrink(%):   1.7921E+01

 #TERE:
 Elapsed estimation time in seconds:   497.34

 ********************               FIRST ORDER CONDITIONAL ESTIMATION WITH INTERACTION              ********************
 #OBJT:**************                       MINIMUM VALUE OF OBJECTIVE FUNCTION                      ********************
 #OBJV:********************************************      101.804       **************************************************

 ********************               FIRST ORDER CONDITIONAL ESTIMATION WITH INTERACTION              ********************
 ********************                             FINAL PARAMETER ESTIMATE                           ********************

 THETA - VECTOR OF FIXED EFFECTS PARAMETERS   *********
         TH 1      TH 2      TH 3      TH 4      TH 5      TH 6      TH 7      TH 8
         5.11E-01  7.08E-01  8.30E+00  1.24E-01  1.00E+00  7.50E-01 -1.66E-06  1.66E-01

 OMEGA - COV MATRIX FOR RANDOM EFFECTS - ETAS  ********
            ETA1      ETA2      ETA3      ETA4
 ETA1
+        1.00E-02
 ETA2
+        0.00E+00  2.61E-01
 ETA3
+        0.00E+00  0.00E+00  1.12E-02
 ETA4
+        0.00E+00  0.00E+00  5.27E-04  6.65E-02

 SIGMA - COV MATRIX FOR RANDOM EFFECTS - EPSILONS  ****
            EPS1
 EPS1
+        1.00E+00

 OMEGA - CORR MATRIX FOR RANDOM EFFECTS - ETAS  *******
            ETA1      ETA2      ETA3      ETA4
 ETA1
+        1.00E-01
 ETA2
+        0.00E+00  5.10E-01
 ETA3
+        0.00E+00  0.00E+00  1.06E-01
 ETA4
+        0.00E+00  0.00E+00  1.94E-02  2.58E-01

 SIGMA - CORR MATRIX FOR RANDOM EFFECTS - EPSILONS  ***
            EPS1
 EPS1
+        1.00E+00
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